// COMSOL Multiphysics 6.0.0.405 model "wineglass_3D.mph"
// Outline of the model tree

Parameters
  D1 = 70[mm]
  D2 = 85[mm]
  h1 = 10[mm]
  h2 = 60[mm]
  h3 = 10[mm]
  h4 = 30[mm]
  h5 = 115[mm]
  t1 = 10[mm]
  t2 = 2[mm]
  t3 = 1[mm]

Common definitions
  mpf1: ParticipationFactors

Geometry
  geom1 "Geometry 1" (3D, length unit m)
    wp1: WorkPlane | quickplane = yz; unite = on
      r1: Rectangle (disabled) | size = {3/4*D2, t2}
      r2: Rectangle (disabled) | pos = {0, t2}; size = {3/4*D2, h1}
      pol1: Polygon | source = table; table = {{0, 0}, {0.06375, 0}, {0.06375, 0.002}, {0, 0.002}, {0, 0}}
      cc1: CompositeCurve | type = solid
        qb1: QuadraticBezier "Quadratic Bézier 1" | p = {{0.06375, 0.02, 0.01}, {0.002, 0.002, 0.012}}
        pol1: Polygon | type = open; source = table; table = {{0.01, 0.012}, {0, 0.012}, {0, 0.002}, {0.06375, 0.002}}
      uni1: Union | input = pol1, cc1; intbnd = off; edge = all
      pt2: Point (disabled) | p = {3/2*t1, t2+h1+h2+h3}
      r4: Rectangle (disabled) | pos = {0, t2+h1+h2}; size = {t1, h3}
      r3: Rectangle | pos = {0, t2+h1}; size = {t1, h2}
      cc2: CompositeCurve | type = solid
        qb1: QuadraticBezier "Quadratic Bézier 1" | p = {{0.01, 0.01, 0.015}, {0.072, 0.082, 0.082}}
        pol1: Polygon | type = open; source = table; table = {{0.015, 0.082}, {0, 0.082}, {0, 0.072}, {0.01, 0.072}}
      uni2: Union | input = cc2, r3; intbnd = off; edge = all
      pt3: Point (disabled) | p = {3/2*D2, t2+h1+h2+h3+0.5*h5+h4}
      pt8: Point (disabled) | p = {3/2*D2-t3, t2+h1+h2+h3+0.5*h5+h4}
      pt4: Point (disabled) | p = {D1, t2+h1+h2+h3+h5+h4}
      pt5: Point (disabled) | p = {3/2*D2-2*t3, t2+h1+h2+h3+h4}
      pt7: Point (disabled) | p = {3/2*D2-2*t3, t2+h1+h2+h3}
      pt6: Point (disabled) | p = {D1-t3, t2+h1+h2+h3+h4+h5}
      r5: Rectangle (disabled) | pos = {0, t2+h1+h2+h3}; size = {3/2*D2, h4}
      r6: Rectangle (disabled) | pos = {0, t2+h1+h2+h3+h4}; size = {3/2*D2, h5}
      cc3: CompositeCurve | type = solid
        qb1: QuadraticBezier "Quadratic Bézier 2" | p = {{0.015, 0.18, 0.07}, {0.082, 0.07, 0.227}}
        pol1: Polygon | type = open; source = table; table = {{0.07, 0.227}, {0.069, 0.227}}
        qb2: QuadraticBezier "Quadratic Bézier 3" | p = {{0.069, 0.176721394062, 0}, {0.227, 0.072, 0.09}}
        pol2: Polygon | type = open; source = table; table = {{0, 0.09}, {0, 0.082}, {0.015, 0.082}}
    rev1: Revolve | workplane = wp1; input = wp1; angtype = full
    csol1: ConvertToSolid | input = rev1
    fin: Finalize "Form Union"

Materials
  mat1: Common "Material 1"
    def "Basic"
      density = 2203
      poissonsratio = 0.17
      youngsmodulus = 73.1e9
  matlnk1: Link "Material Link 1" on all domains

Physics
  solid: SolidMechanics on all domains
    dependent variable u = {u, v, w}
    lemm1: LinearElasticModel "Linear Elastic Material 1" (default)
    free1: Free (default)
    init1: init "Initial Values 1" (default)
    disp1: Displacement2 "Prescribed Displacement 1" on boundaries 9, 10, 25, 32 | Direction = {0, 0, 1}

Mesh
  mesh1 "Mesh 1"
    size: MeshSizeDefault | hauto = 7
    ftri1: FreeTri "Free Triangular 1" on boundaries 1, 2, 21, 43
      size1: Size on boundaries 1, 2, 21, 43 | hauto = 3
    ftet2: FreeTet "Free Tetrahedral 1" on domains 1
      size1: Size on domains 1 | hauto = 3
    ftet1: FreeTet "Free Tetrahedral 2" on domains 3
      size1: Size on domains 3
    ftet3: FreeTet "Free Tetrahedral 3" on remaining entities

Studies
  std1 "Study 1"
    eig: Eigenfrequency | neigs = 20; shift = 1000[Hz]; conrad = 1

Solver configurations
  sol1 "Solution 1" (study std1)
    v1: Variables "Dependent Variables 1"
    e1: Eigenvalue "Eigenvalue Solver 1" | eigvfunscale = maximum; eigvfunscaleparam = 4.18e-07
      dDef: Direct

Datasets
  dset1: Solution | solution = sol1

Derived values
  gev1: EvalGlobal "Global Evaluation 1" | data = dset1; table = tbl1

Evaluation groups
  std1EvgFrq: EvaluationGroup "Eigenfrequencies (Study 1)" | data = dset1
    gev1: EvalGlobal "Global Evaluation 1"
      expr = {freq*2*pi, imag(freq)/abs(freq), abs(freq)/imag(freq)/2}
      unit = {rad/s, 1, 1}
      descr = {Angular frequency, Damping ratio, Quality factor}
  std1mpf1: EvaluationGroup "Participation Factors (Study 1)" | data = dset1
    gev1: EvalGlobal "Global Evaluation 1"
      expr = {mpf1.pfLnormX, mpf1.pfLnormY, mpf1.pfLnormZ, mpf1.pfRnormX, mpf1.pfRnormY, mpf1.pfRnormZ, mpf1.mEffLX, mpf1.mEffLY, mpf1.mEffLZ, mpf1.mEffRX, mpf1.mEffRY, mpf1.mEffRZ}
      unit = {1, 1, 1, 1, 1, 1, kg, kg, kg, kg*m^2, kg*m^2, kg*m^2}
      descr = {"Participation factor, normalized, X-translation", "Participation factor, normalized, Y-translation", "Participation factor, normalized, Z-translation", "Participation factor, normalized, X-rotation", "Participation factor, normalized, Y-rotation", "Participation factor, normalized, Z-rotation", "Effective modal mass, X-translation", "Effective modal mass, Y-translation", "Effective modal mass, Z-translation", "Effective modal mass, X-rotation", "Effective modal mass, Y-rotation", "Effective modal mass, Z-rotation"}

Plots
  pg1: PlotGroup3D "Mode Shape (solid)" | data = dset1
    surf1: Surface | expr = solid.disp
      def: Deform "Deformation" | expr = {u, v, w}; descr = Displacement field