// COMSOL Multiphysics 6.0.0.405 model "trumpet.mph"
// Outline of the model tree
// Components: comp1 "Tube", comp2 "Tube with Bell", comp3 "Mouthpiece", comp4 "Complete trumpet model"

Parameters
  rT = 0.6[cm]  // Tube radius
  rS = 2[m]  // Air sphere radius
  N = 255  // Number of frequencies
  Lt = 1.37[m]  // Tube length
  Lspace = 20[mm]  // Length empty space
  lambdaMax = c0/fMax  // Wave length max frequency
  fMin = 50[Hz]  // Min frequency
  fMax = 1200[Hz]  // Max frequency
  c0 = 343[m/s]  // Wave speed
  Lh = 0.2[m]  // Bell length
  m = 28  // Bell exponent
  St = rT^2*pi  // Surface tube
  rM = rT+0.3[cm]  // Mouthpiece radius
  Lm = 10[cm]  // Length mouthpiece

Couplings
  intop4: Integration on boundaries 5 | opname = intop1; axisym = on
  intop5: Integration on boundaries 5 | opname = intop2; axisym = on
  intop6: Integration on boundaries 5 | opname = intop3; axisym = on
  intop7: Integration on boundaries 5 | opname = intop4; axisym = on

Coordinate systems
  pml1: PML "Perfectly Matched Layer 1" [geom1] on domains 1, 4
    wavelengthSourceType = userDefined
    typicalWavelength = lambdaMax
  pml2: PML "Perfectly Matched Layer 1" [geom2] on domains 1, 4
    wavelengthSourceType = userDefined
    typicalWavelength = lambdaMax
  pml3: PML "Perfectly Matched Layer 1" [geom3] on domains 1, 4
    wavelengthSourceType = userDefined
    typicalWavelength = lambdaMax
  pml4: PML "Perfectly Matched Layer 1" [geom4] on domains 1, 4
    wavelengthSourceType = userDefined
    typicalWavelength = lambdaMax

Geometry
  geom1 "Geometry 1" [comp1] (2D axisymmetric, length unit m)
    pi1: PartInstance "Free Field 1"
      part = part2
      inputname = {Wspace, amp, spaceOffset}
      inputexpr = {rT, rS, Lt}
      inputvalue = {0.006 [m], 2.0 [m], 1.37 [m]}
      selkeepnoncontr = off
      argunit = {m, m, m}
      lengthunit = m
    pi2: PartInstance "Tube 1"
      part = part1
      inputname = {mOffset, hOffset}
      inputexpr = {0[m], 0[m]}
      inputvalue = {0.0 [m], 0.0 [m]}
      selkeepnoncontr = off
      argunit = {m, m}
      lengthunit = m
    fin: Finalize "Form Union"
  geom2 "Geometry 1" [comp2] (2D axisymmetric, length unit m)
    pi1: PartInstance "Free Field 1"
      part = part2
      inputname = {Wspace, amp, spaceOffset}
      inputexpr = {rT, rS, Lt}
      inputvalue = {0.006 [m], 2.0 [m], 1.37 [m]}
      selkeepnoncontr = off
      argunit = {m, m, m}
      lengthunit = m
    pi2: PartInstance "Tube 1"
      part = part1
      inputname = {mOffset, hOffset}
      inputexpr = {0, Lh[m]}
      inputvalue = {0.0 [m], 0.2 [m^2]}
      selkeepnoncontr = off
      argunit = {m, m}
      lengthunit = m
    pi3: PartInstance "Bell 1" | part = part3; selkeepnoncontr = off; lengthunit = m
    csol1: ConvertToSolid | input = pi3
    uni1: Union | input = csol1, pi2; intbnd = off; edge = all
    fin: Finalize "Form Union"
  part2 "Free Field" (2D, length unit m)
    c1: Circle "Sphere" | rot = 270; layername = Layer 1; layer = 0.25; r = amp; angle = 180
    r2: Rectangle "Empty Space" | pos = {0, -spaceOffset}; rot = 270; size = {Lspace, Wspace}
    dif1: Difference "Remove Empty Space" | input = c1; input2 = r2
  part1 "Tube" (2D, length unit m)
    pol1: Polygon | source = table; table = {{0, -hOffset}, {rT, -hOffset}, {rT, -Lt+mOffset}, {0, -Lt+mOffset}}
  part3 "Bell" (2D, length unit m)
    pc1: ParametricCurve | pos = {0, -Lh}; rot = 90; parmax = Lh; coord = {s, -sqrt((St/pi)*exp(m*s))}
    ls1: LineSegment | vertex1 = pc1(1) points 1; specify2 = coord; coord2 = {0, -Lh}
    ls2: LineSegment | vertex1 = pc1(1) points 2; specify2 = coord
    ls3: LineSegment | vertex1 = ls1(1) points 2; vertex2 = ls2(1) points 2
    uni1: Union | input = ls1, ls2, ls3, pc1
  part4 "Mouthpiece" (2D, length unit m)
    c1: Circle | pos = {0, -Lm+yOffset}; r = rM; angle = 90
    pol1: Polygon
      source = table
      table = {{rT/8, -Lm+0.001+yOffset}, {rT, yOffset}, {0, yOffset}, {0, -Lm+0.001+yOffset}}
    uni1: Union | input = c1, pol1; intbnd = off; edge = all
  geom3 "Geometry 1" [comp3] (2D axisymmetric, length unit m)
    pi1: PartInstance "Free Field 1"
      part = part2
      inputname = {Wspace, amp, spaceOffset}
      inputexpr = {rM, rS/2, Lm}
      inputvalue = {0.009 [m], 1.0 [m], 0.1 [m]}
      selkeepnoncontr = off
      argunit = {m, m, m}
      lengthunit = m
    pi2: PartInstance "Mouthpiece 1"
      part = part4
      inputname = yOffset
      inputexpr = 0[m]
      inputvalue = 0.0 [m]
      selkeepnoncontr = off
      argunit = m
      lengthunit = m
    fin: Finalize "Form Union"
  geom4 "Geometry 1" [comp4] (2D axisymmetric, length unit m)
    pi1: PartInstance "Free Field 1"
      part = part2
      inputname = {Wspace, amp, spaceOffset}
      inputexpr = {rM, rS, Lt}
      inputvalue = {0.009 [m], 2.0 [m], 1.37 [m]}
      selkeepnoncontr = off
      argunit = {m, m, m}
      lengthunit = m
    pi3: PartInstance "Tube 1"
      part = part1
      inputname = {mOffset, hOffset}
      inputexpr = {Lm, Lh}
      inputvalue = {0.1 [m], 0.2 [m]}
      selkeepnoncontr = off
      argunit = {m, m}
      lengthunit = m
    pi4: PartInstance "Bell 1" | part = part3; selkeepnoncontr = off; lengthunit = m
    pi5: PartInstance "Mouthpiece 1"
      part = part4
      inputname = yOffset
      inputexpr = -Lt+Lm
      inputvalue = -1.27 [m]
      selkeepnoncontr = off
      argunit = m
      lengthunit = m
    csol1: ConvertToSolid | input = pi4
    uni1: Union | input = csol1, pi3, pi5; intbnd = off; edge = all
    fin: Finalize "Form Union"

Materials
  mat2: Common "Air"
    def "Basic"
      thermalexpansioncoefficient = alpha_p(pA,T)
      molarmass = 0.02897[kg/mol]
      bulkviscosity = muB(T)
      relpermeability = 1
      relpermittivity = 1
      dynamicviscosity = eta(T)
      ratioofspecificheat = 1.4
      electricconductivity = 0[S/m]
      heatcapacity = Cp(T)
      density = rho(pA,T)
      thermalconductivity = k(T)
      soundspeed = cs(T)
      eta: Piecewise | arg = T; pieces = {200.0, 1600.0, -8.38278E-7+8.35717342E-8*T^1-7.69429583E-11*T^2+4.6437266E-14*T^3-1.06585607E-17*T^4}; argunit = K; fununit = Pa*s
      Cp: Piecewise | arg = T; pieces = {200.0, 1600.0, 1047.63657-0.372589265*T^1+9.45304214E-4*T^2-6.02409443E-7*T^3+1.2858961E-10*T^4}; argunit = K; fununit = J/(kg*K)
      rho: Analytic | expr = pA*0.02897/R_const[K*mol/J]/T; args = {pA, T}; fununit = kg/m^3; argunit = {Pa, K}
      k: Piecewise | arg = T; pieces = {200.0, 1600.0, -0.00227583562+1.15480022E-4*T^1-7.90252856E-8*T^2+4.11702505E-11*T^3-7.43864331E-15*T^4}; argunit = K; fununit = W/(m*K)
      cs: Analytic | expr = sqrt(1.4*R_const[K*mol/J]/0.02897*T); args = T; fununit = m/s; argunit = K
      an1: Analytic | funcname = alpha_p; expr = -1/rho(pA,T)*d(rho(pA,T),T); args = {pA, T}; fununit = 1/K; argunit = {Pa, K}
      an2: Analytic "Analytic 2a" | funcname = muB; expr = 0.6*eta(T); args = T; fununit = Pa*s; argunit = K
    RefractiveIndex
      n = 1
      ki = 0
    NonlinearModel
      BA = (def.gamma+1)/2
    idealGas
      Rs = R_const/Mn
      heatcapacity = Cp(T)
      ratioofspecificheat = 1.4
      molarmass = 0.02897
      Cp: Piecewise | arg = T; pieces = {200.0, 1600.0, 1047.63657-0.372589265*T^1+9.45304214E-4*T^2-6.02409443E-7*T^3+1.2858961E-10*T^4}; argunit = K; fununit = J/(kg*K)
  matlnk1: Link "Material Link 1" [comp1] on all domains
  matlnk3: Link "Material Link 1" [comp2] on all domains
  matlnk5: Link "Material Link 1" [comp3] on all domains
  matlnk7: Link "Material Link 1" [comp4] on all domains

Physics
  acpr: PressureAcoustics "Pressure Acoustics, Frequency Domain" [geom1] on all domains
    dependent variable p
    fpam1: FrequencyPressureAcousticsModel "Pressure Acoustics 1" (default)
    axi1: AxialSymmetry (default)
    shb1: SoundHard "Sound Hard Boundary (Wall) 1" (default)
    init1: init "Initial Values 1" (default)
    ishb1: InteriorSoundHard "Interior Sound Hard Boundary (Wall) 1" on boundaries 10
    port1: Port on boundaries 5 | PortType = Circular; pamp = 1.1
  acpr2: PressureAcoustics "Pressure Acoustics, Frequency Domain 2" [geom2] on all domains
    dependent variable p2
    fpam1: FrequencyPressureAcousticsModel "Pressure Acoustics 1" (default)
    axi1: AxialSymmetry (default)
    shb1: SoundHard "Sound Hard Boundary (Wall) 1" (default)
    init1: init "Initial Values 1" (default)
    ishb1: InteriorSoundHard "Interior Sound Hard Boundary (Wall) 1" on boundaries 11, 17
    port1: Port on boundaries 5 | PortType = Circular; pamp = 1.1
  acpr3: PressureAcoustics "Pressure Acoustics, Frequency Domain 3" [geom3] on all domains
    dependent variable p3
    fpam1: FrequencyPressureAcousticsModel "Pressure Acoustics 1" (default)
    axi1: AxialSymmetry (default)
    shb1: SoundHard "Sound Hard Boundary (Wall) 1" (default)
    init1: init "Initial Values 1" (default)
    ishb1: InteriorSoundHard "Interior Sound Hard Boundary (Wall) 1" on boundaries 11, 18
    port1: Port on boundaries 5 | PortType = Circular; pamp = 1.1
  acpr4: PressureAcoustics "Pressure Acoustics, Frequency Domain 4" [geom4] on all domains
    dependent variable p4
    fpam1: FrequencyPressureAcousticsModel "Pressure Acoustics 1" (default)
    axi1: AxialSymmetry (default)
    shb1: SoundHard "Sound Hard Boundary (Wall) 1" (default)
    init1: init "Initial Values 1" (default)
    ishb1: InteriorSoundHard "Interior Sound Hard Boundary (Wall) 1" on boundaries 13, 14, 21, 22
    port1: Port on boundaries 5 | PortType = Circular; pamp = 1.1

Mesh
  mesh1 "Mesh 1" [geom1]
    size: MeshSizeDefault | hmax = lambdaMax/5; hmin = 6e-7; custom = on; hcurve = 1
    ftri1: FreeTri "Free Triangular 1" on domains 2, 3
    map1: Map "Mapped 1" on domains 1, 4 | adjustedgdistr = on
      dis1: Distribution on boundaries 8
  mesh2 "Mesh 1" [geom2]
    size: MeshSizeDefault | hmax = lambdaMax/5; hmin = 6e-7; hgrad = 1.3; hauto = 2; custom = on; hcurve = 1
    ftri1: FreeTri "Free Triangular 1" on domains 2, 3
    map1: Map "Mapped 1" on domains 1, 4
      dis1: Distribution on boundaries 9
  mesh3 "Mesh 1" [geom3]
    size: MeshSizeDefault | hmax = lambdaMax/5; hmin = 6e-7; hgrad = 1.3; hauto = 2; custom = on; hcurve = 1
    ftri1: FreeTri "Free Triangular 1" on domains 2, 3
    map1: Map "Mapped 1" on domains 1, 4
      dis1: Distribution on boundaries 10
  mesh4 "Mesh 1" [geom4]
    size: MeshSizeDefault | hmax = lambdaMax/5; hmin = 6e-7; hgrad = 1.3; hauto = 2; custom = on; hcurve = 1
    ftri1: FreeTri "Free Triangular 1" on domains 2, 3
    map1: Map "Mapped 1" on domains 1, 4
      dis1: Distribution on boundaries 12

Studies
  std1 "Study 1 - Tube"
    freq: Frequency "Frequency Domain" | plist = range(fMin,(fMax-(fMin))/(N-1),fMax); solve for = {acpr}
  std2 "Study 2 - Tube with Bell"
    freq: Frequency "Frequency Domain" | plist = range(fMin,(fMax-(fMin))/(N-1),fMax); solve for = {acpr2}
  std3 "Study 3 - Mouthpiece"
    freq: Frequency "Frequency Domain" | plist = range(fMin,(fMax-(fMin))/(N-1),fMax); solve for = {acpr3}
  std4 "Study 4 - Complete Model"
    freq: Frequency "Frequency Domain" | plist = range(fMin,(fMax-(fMin))/(N-1),fMax); solve for = {acpr4}
  std5 "All Studies"
    ref: StudyReference | studyref = std1
    ref2: StudyReference | studyref = std2
    ref3: StudyReference | studyref = std3
    ref4: StudyReference | studyref = std4

Solver configurations
  sol1 "Solution 1" (study std1)
    v1: Variables "Dependent Variables 1"
    s1: Stationary "Stationary Solver 1"
      dDef: Direct
      p1: Parametric | pname = freq; plistarr = range(fMin,(fMax-(fMin))/(N-1),fMax); punit = Hz; pcontinuationmode = no
      fc1: FullyCoupled | linsolver = dDef
  sol2 "Solution 2" (study std5)
    copy1: CopySolution
  sol3 "Solution 3" (study std2)
    // same settings as sol1
  sol4 "Solution 4" (study std3)
    // same settings as sol1
  sol5 "Solution 5" (study std4)
    // same settings as sol1

Datasets
  dset1: Solution | solution = sol1
  dset2: Solution | solution = sol1
  dset3: Solution | solution = sol1
  dset4: Solution | solution = sol1
  dset5: Solution | solution = sol3
  dset6: Solution | solution = sol3
  dset7: Solution | solution = sol3
  dset8: Solution | solution = sol3
  dset9: Solution | solution = sol4
  dset10: Solution | solution = sol4
  dset11: Solution | solution = sol4
  dset12: Solution | solution = sol4
  dset13: Solution | solution = sol5
  dset14: Solution | solution = sol5
  dset15: Solution | solution = sol5
  dset16: Solution | solution = sol5
  dset17: Solution | solution = sol2
  dset18: Solution | solution = sol2
  dset19: Solution | solution = sol2
  dset20: Solution | solution = sol2
  rev1: Revolve2D "Revolution 2D 1" | data = dset16; startangle = -90; revangle = 225
  rev2: Revolve2D "Revolution 2D 2" | data = dset11; startangle = -90; revangle = 225
  rev3: Revolve2D "Revolution 2D 3" | data = dset6; startangle = -90; revangle = 225
  rev4: Revolve2D "Revolution 2D 4" | data = dset1; startangle = -90; revangle = 225

Plots
  pg17: PlotGroup1D "Input Impedance" | data = none; xlabel = freq [Hz]; ylabel = |Z<SUB>in</SUB>| [dB]
    glob1: Global "Tube" | data = dset1; expr = 10*log10(abs(intop1(acpr.p_t)/intop1(acpr.vz))); descr = Tube
    glob2: Global "Tube with bell"
      data = dset6
      expr = 10*log10(abs(intop2(acpr2.p_t)/intop2(acpr2.vz)))
      descr = Tube with bell
    glob3: Global "Mouthpiece"
      data = dset11
      expr = 10*log10(abs(intop3(acpr3.p_t)/intop3(acpr3.vz)))
      descr = Mouthpiece
    glob4: Global "Complete trumpet model"
      data = dset16
      expr = 10*log10(abs(intop4(acpr4.p_t)/intop4(acpr4.vz)))
      descr = Complete model
  pg1: PlotGroup2D "Acoustic Pressure (acpr4)" | data = dset16
    surf1: Surface | expr = acpr4.p_t
  pg2: PlotGroup2D "Sound Pressure Level (acpr4)" | data = dset16
    surf1: Surface | expr = acpr4.Lp_t
  pg3: PlotGroup3D "Acoustic Pressure, 3D (acpr4)" | data = rev1
    surf1: Surface | expr = acpr4.p_t
  pg4: PlotGroup3D "Sound Pressure Level, 3D (acpr4)" | data = rev1
    surf1: Surface | expr = acpr4.Lp_t
  pg5: PlotGroup2D "Acoustic Pressure (acpr3)" | data = dset11
    surf1: Surface | expr = acpr3.p_t
  pg6: PlotGroup2D "Sound Pressure Level (acpr3)" | data = dset11
    surf1: Surface | expr = acpr3.Lp_t
  pg7: PlotGroup3D "Acoustic Pressure, 3D (acpr3)" | data = rev2
    surf1: Surface | expr = acpr3.p_t
  pg8: PlotGroup3D "Sound Pressure Level, 3D (acpr3)" | data = rev2
    surf1: Surface | expr = acpr3.Lp_t
  pg9: PlotGroup2D "Acoustic Pressure (acpr2)" | data = dset6
    surf1: Surface | expr = acpr2.p_t
  pg10: PlotGroup2D "Sound Pressure Level (acpr2)" | data = dset6
    surf1: Surface | expr = acpr2.Lp_t
  pg11: PlotGroup3D "Acoustic Pressure, 3D (acpr2)" | data = rev3
    surf1: Surface | expr = acpr2.p_t
  pg12: PlotGroup3D "Sound Pressure Level, 3D (acpr2)" | data = rev3
    surf1: Surface | expr = acpr2.Lp_t
  pg13: PlotGroup2D "Acoustic Pressure (acpr)" | data = dset1
    surf1: Surface | expr = acpr.p_t
  pg14: PlotGroup2D "Sound Pressure Level (acpr)" | data = dset1
    surf1: Surface | expr = acpr.Lp_t
  pg15: PlotGroup3D "Acoustic Pressure, 3D (acpr)" | data = rev4
    surf1: Surface | expr = acpr.p_t
  pg16: PlotGroup3D "Sound Pressure Level, 3D (acpr)" | data = rev4
    surf1: Surface | expr = acpr.Lp_t