// COMSOL Multiphysics 6.0.0.405 model "soundboard.mph"
// Outline of the model tree

Parameters
  Lx = 1.4[m]  // Soundboard width (radial direction)
  Ly = 1[m]  // Soundboard height (longitudinal direction)
  Lz = 1[cm]  // Soundboard thickness (tangential direction)
  m = 10  // # Measurement points along longitudinal direction
  n = 14  // # Measurement points along radial direction
  xOffset = 18[cm]  // Distance of load points from radial border
  yOffset = 14[cm]  // Distance of load points from longitudinal border
  Xs = (Lx-2*xOffset)/(n-1)  // Spatial sampling period along radial direction
  Ys = (Ly-2*yOffset)/(m-1)  // Spatial sampling period along longitudinal direction
  xLoad = 0.18[m]  // Current radial load position
  yLoad = 0.14[m]  // Current longitudinal load position
  fstart = 15[Hz]  // Start frequency for frequency domain study
  fstep = 5  // Frequency sampling step for frequency domain study
  fend = 800[Hz]  // Stop frequency for frequency domain study

Common definitions
  mpf1: ParticipationFactors

Geometry
  geom1 "Soundboard" (3D, length unit m)
    blk1: Block "Thin Plate" | size = {Lx, Ly, Lz}
    wp1: WorkPlane "Load Point" | quickz = Lz; unite = on
      c1: Circle | pos = {xLoad, yLoad}; r = 0.005
      pt1: Point | p = {xLoad, yLoad}
    wp2: WorkPlane | unite = on
      r1: Rectangle | pos = {0, 1}; size = {1.4, 0.2}
      csol1: ConvertToSolid | input = r1
    wp3: WorkPlane | quickz = Lz + 0.001; unite = on
      pt1: Point | p = {0.74, 0.46}
      pt2: Point | p = {0.82, 0.54}
      pt3: Point | p = {0.90, 0.62}
      pt4: Point | p = {0.98, 0.7}
      pt5: Point | p = {1.06, 0.78}
      ic1: InterpolationCurve
        table = 
          {0.712388505936, 0.446356458664}
          {0.872388505936, 0.626356458664}
          {1.07238850594, 0.806356458664}
        starttang = {0.319753091124, 0.399999237943}
        endtang = {0.400246908876, 0.320000762057}
      ic2: InterpolationCurve
        table = 
          {0.736234834194, 0.421255095005}
          {0.896234834194, 0.601255095005}
          {1.09623483419, 0.781255095005}
        starttang = {0.319753091124, 0.399999237943}
        endtang = {0.400246908876, 0.320000762057}
      pol1: Polygon
        type = open
        source = table
        table = {{0.712388505936, 0.446356458664}, {0.736234834194, 0.421255095005}}
      pol2: Polygon
        type = open
        source = table
        table = {{1.07238850594, 0.806356458664}, {1.09623483419, 0.781255095005}}
      csol1: ConvertToSolid | input = ic1, ic2, pol1, pol2, pt1, pt2, pt3, pt4, pt5
      pt6: Point | p = {1.06, 1.1}
      pt7: Point | p = {0.98, 1.1}
      pt8: Point | p = {0.90, 1.1}
      pt9: Point | p = {0.82, 1.1}
      pt10: Point | p = {0.74, 1.1}
    ext1: Extrude | workplane = wp3; input = wp3; distance = 0.025
    ext2: Extrude | workplane = wp2; input = wp2; inputhandling = keep; distance = 0.015
    cyl1: Cylinder | pos = {0.74, 0.46, 0.035}; axistype = y; r = 0.85e-3; h = 1-0.46+0.1
    cyl2: Cylinder | pos = {0.82, 0.54, 0.035}; axistype = y; r = 0.85e-3; h = 1-0.54+0.1
    cyl3: Cylinder | pos = {0.9, 0.62, 0.035}; axistype = y; r = 0.85e-3; h = 1-0.62+0.1
    cyl4: Cylinder | pos = {0.98, 0.7, 0.035}; axistype = y; r = 0.85e-3; h = 1-0.7+0.1
    cyl5: Cylinder | pos = {1.06, 0.78, 0.035}; axistype = y; r = 0.85e-3; h = 1-0.78+0.1
    uni1: Union | input = cyl1, cyl2, cyl3, cyl4, cyl5, ext1, ext2
    fin: Finalize "Form Union"

Materials
  mat1: Common "Spruce [solid]" on all domains
    def "Basic"
      density = rho(T)
      rho: Piecewise | arg = T; pieces = {293.0, 303.0, 340.0}; argunit = K; fununit = kg/m^3
    KG "Bulk modulus and shear modulus"
      G = mu(T)
      mu: Piecewise | arg = T; pieces = {173.0, 423.0, -3.052358E9+1.017412E8*T^1-575967.0*T^2+1368.923*T^3-1.198286*T^4}; argunit = K; fununit = Pa

Physics
  solid: SolidMechanics on domains 1
    dependent variable u = {u, v, w}
    lemm1: LinearElasticModel "Linear Elastic Material 1" (default)
      SolidModel = Orthotropic
      Evector_mat = userdef
      Evector = {1.19e9, 12.1e9, 1.428e9}
      nuvector_mat = userdef
      nuvector = {0.03, 0.422, 0.019}
      Gvector_mat = userdef
      Gvector = {0.988e9, 1.021e9, 0.08281e9}
      rho_mat = userdef
      rho = 350
      dmp1: Damping on all domains | beta_dK = 2e-6; eta_s_mat = userdef; eta_s = 0.015
    free1: Free (default)
    init1: init "Initial Values 1" (default)
    fix1: Fixed "Fixed Constraint 1" on boundaries 1, 2, 6, 83
    bndl1: BoundaryLoad on boundaries 11
      LoadType = TotalForce
      Ftot = {0, 0, 1}
      FperArea = {0, 0, 1}
      harmonicPerturbation = 1

Mesh
  mesh1 "Mesh 1"
    size: MeshSizeDefault | hauto = 2
    ftri1: FreeTri "Free Triangular 1" on boundaries 4, 11
    swe1: Sweep "Swept 1" on domains 1 | sourceface = boundaries 4, 11; targetface = boundaries 3
      dis1: Distribution on domains 1

Studies
  std2 "Study 1"
    param1: Parametric "Parametric Sweep"
      sweeptype = filled
      pname = {xLoad, yLoad}
      plistarr = {range(xOffset,Xs,xOffset+Xs*(n/2-1)), range(yOffset,Ys,yOffset+Ys*(m/2-1))}
      punit = {m, m}
    eig: Eigenfrequency | neigs = 25; shift = 400[Hz]
    frmod: Frequencymodal "Frequency Domain, Modal" | plist = range(fstart,fstep,fend)

Solver configurations
  sol1 "Solution 1" (study std2)
    v1: Variables "Dependent Variables 1"
    e1: Eigenvalue "Eigenvalue Solver 1"
      transform = eigenfrequency
      neigs = 25
      shift = 400[Hz]
      eigvfunscale = maximum
      eigvfunscaleparam = 1.72e-06
      dDef: Direct
    su1: StoreSolution "Solution Store 1"
    v2: Variables "Dependent Variables 2" | notsolmethod = sol
    mo1: Modal "Modal Solver 1" | plist = range(fstart,fstep,fend)
      dDef: Direct
  sol39 "Parametric Solutions 2" (study std2)
  sol2 "Solution Store 1" (study std2)
  sol75 "Parametric Solutions 3" (study std2)

Datasets
  dset1: Solution | solution = sol1
  dset2: Solution | solution = sol2
  dset4: Solution "Study 1/Parametric Solutions 1" | solution = sol39
  dset5: Solution | solution = sol75

Derived values
  av1: AvSurface "Surface Average 1" on boundaries 11 | data = dset4; table = tbl1; expr = 1/solid.u_tZ; unit = s/m

Tables
  tbl1: Table
    // Surface Average 1
    xLoad (m) | yLoad (m) | freq (Hz) | 1/solid.u_tZ (s/m)
    0.18 | 0.14 | 15 | 1.05456-5555.42i
    0.18 | 0.14 | 20 | 1.05488-4143.35i
    0.18 | 0.14 | 25 | 1.05561-3289.94i
    0.18 | 0.14 | 30 | 1.05715-2715.17i
    0.18 | 0.14 | 35 | 1.06021-2298.73i
    0.18 | 0.14 | 40 | 1.06623-1979.93i
    0.18 | 0.14 | 45 | 1.07849-1724.23i
    0.18 | 0.14 | 50 | 1.10609-1509.04i
    0.18 | 0.14 | 55 | 1.18602-1314.76i
    0.18 | 0.14 | 60 | 1.74145-1096.2i
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
Plots
  pg3: PlotGroup3D "Mode Shape" | data = dset2
    surf1: Surface | expr = solid.disp
  pg5: PlotGroup3D "Stress (solid) 1" | data = dset4
    vol1: Volume | expr = solid.mises_peak
      def: Deform "Deformation" | expr = {u, v, w}
  pg6: PlotGroup2D "Impedance(x, y)"
    tbls1: TableSurface | table = tbl1; plotdata = manual; param = 78
  pg7: PlotGroup3D "Stress (solid)" | data = dset1
    vol1: Volume | expr = solid.mises_peak
      def: Deform "Deformation" | expr = {u, v, w}
  pg8: PlotGroup3D "Boundary Loads (solid)" | data = dset1
    surf1: Surface "Gray Surfaces" | expr = 1
      def: Deform "Deformation" | expr = {u, v, w}
      sel1: Selection
  pg9: PlotGroup3D "Stress (solid) 2" | data = dset5
    vol1: Volume | expr = solid.mises_peak
      def: Deform "Deformation" | expr = {u, v, w}; descr = Displacement field
  pg10: PlotGroup3D "Boundary Loads (solid) 1" | data = dset5
    arws1: ArrowSurface "Boundary Load 1" | expr = {solid.bndl1.F_Ax, solid.bndl1.F_Ay, solid.bndl1.F_Az}
      col: Color "Color Expression" | expr = solid.bndl1.F_A_Mag
      def: Deform "Deformation" | expr = {u, v, w}; descr = Displacement field
    surf1: Surface "Gray Surfaces" | expr = 1
      def: Deform "Deformation" | expr = {u, v, w}; descr = Displacement field
      sel1: Selection on boundaries 1-4, 6, 11, 83
      tran1: Transparency | transparency = 0.8